# OpenSim document version 40000
Model pendulumDF:
  gravity: 0 -9.81 0
  Ground
  BodySet:
    Body rod: mass=1 [kg] mass_center=(0 0 0) inertia=(1 1 1 0 0 0)
      PhysicalOffsetFrame rodCenter: socket_parent=.. translation=(0 0 0) [meters]
        Cylinder rodCenter_geom_1: radius=0.1 half_height=1
    Body sph: mass=1 mass_center=(0 0 0) inertia=(1 1 1 0 0 0)
      PhysicalOffsetFrame sphCenter: socket_parent=.. translation=(0 0 0)
        Sphere sphCenter_geom_1: radius=0.3
  JointSet:
    PinJoint groundTrodJnt: socket_parent_frame=ground_offset socket_child_frame=rod_offset
      Coordinate groundTrodJnt_coord_0
      PhysicalOffsetFrame ground_offset: socket_parent=/ground translation=(0 0 0)
      PhysicalOffsetFrame rod_offset: socket_parent=/bodyset/rod translation=(0 1 0)
          orientation=(0 0 1.571429) [radians]
    PinJoint rodTsphJnt: socket_parent_frame=rod_offset socket_child_frame=sph_offset
      Coordinate rodTsphJnt_coord_0: default_value=0 locked=true
      PhysicalOffsetFrame rod_offset: socket_parent=/bodyset/rod translation=(-1.998666e-7 -0.0006322446 0)
          orientation=(0 0 1.571429)
      PhysicalOffsetFrame sph_offset: socket_parent=/bodyset/sph translation=(0.9999998 -0.0006322446 0)
  ForceSet:
    BodyDragForce dragForce: body_name=sph coefficient=0.3 exponent=2
    BodyDragForce dragForce2: body_name=sph coefficient=0.9 exponent=2
